read Zug.frd
read Zug.inp nom
read rad.nam inp
# path definition
seti cp n Ntop Nsym
pnt cp cp
pnt p0 0 0 0
pnt rad Nrad
line l1 p0 cp 40 1.1
line l2 p0 rad 20
seto path
 lcmb ! - l1 + l2
setc

ds 30 e 1
rot -z
plot la all
plus pa all
plus n Nbottom b 6
plus n Nsym b 6
hcpy png
sys mv hcpy_1.png path0geo.png
plot fv all
graph path length +
sys convert -rotate 90 graph_0.ps path0.png

view disp
plot la all
plus pa all
plus n Nbottom b 6
plus n Nsym b 6
hcpy png
sys mv hcpy_2.png pathgeo.png
graph path length +
sys convert -rotate 90 graph_1.ps path.png
