sys ccx MSM
read MSM.frd
read MSM.inp nom
# plot model
seta ! all
hcpy png
sys mv hcpy_1.png mesh.png
# plot mode shapes
seta path n 1 2 3
ds 1 e 1
graph path length
ds 2 e 1
graph path length

graph response time PDISP MAG1
graph response time PDISP PHA1

sys gnuplot V.gnu
