read Kasten.frd
rot y
rot r 30
rot u 20
view disp
view elem
frame
zoom 0.9
rep all
ds -1 e 1
# the next command is a trick to enforce correct coloring
plot fv all
plus f all n
plus n
hcpy png deformed

view sh

ds 1 e 4
scal d 100
plot fv all
hcpy png imperfection

ds -1 e 1
scal d
plot fv all
hcpy png PE

ds -3 e 3
scal d
plot fv all
hcpy png D3

# create force-displacement curve
sys ../Scripts/dat2txt.py Kasten
sys gnuplot df.gpl
