read plates.frd
ds -1 e 1
rot -z
rot r 25
rot u 20
view disp
scal d 1000
view elem

seta base all
# the z shift is required to avoid interference between 2D and 3D plot
copy base 2D tra 0 0 0.001
swep base new rot y 270 30
trfm cyl y
frame
view sh
plot fv all
hcpy png polar

plot f all n
plus ev 2D
plus n 2D r 6
hcpy png 2D3D
