read II.frd new
# set x0 is created and displayed as workaround for the dark shading hardcopy bug
# in cgx
enq all x0 rec 0 _ _ 0.01
rot -x
rot c -90
plot f all n
plus n x0 r
zoom 1.1
hcpy png Refs/undefx

rot l 5
rot u 5
frame
zoom 1.1
plot f all n
plus n x0 r
hcpy png Refs/undef

view disp
scal d 100
plot f all n
plus n x0 r
hcpy png Refs/def

view sh off
view elem off
rot x
rot c 90
rot r 10 rot
rot u 10
ds 2 e 1
plot fv all
hcpy png Refs/Sxx

ds 2 e 6
plot fv all
mm 8
hcpy png Refs/Sxz
