sys ../../Scripts/dat2txt.py
sys gnuplot sigeps.gnu

read Zug.frd

seta base se all
copy all new mir x
copy all new mir y
copy all new mir z

plot e all
frame
zoom 2
rot x
rot c 90
rot u 30
rot l 20
ds -1 e 1
view disp
plot fv base
plus e new n
hcpy png pe

view elem
view sh
rot x
rot c 90
plot fv base
frame base
zoom 4
hcpy png pe-int
