read Zug.frd new
read monitor.nam inp

copy all new mir y
copy all new mir z
view disp
view elem
ds -1 e 1
rot x
rot c 90
frame
hcpy png exp

graph Nmonitor time PE PE
sys ../../Scripts/dat2txt.py Zug
sys gnuplot pe.gnu
