# 1D beam
valu le 100

seto b32
  pnt p1 0 0 0
  seta fixb32 se all
  swep all loadb32 tra le 0 0 10
setc

elty b32 be3r
mesh b32

send fixb32 abq nam
send loadb32 abq nam

send b32 abq

sys ccx b32

read b32.frd new
# get nodes at support
seta nodes n all
enq nodes fix rec 0 _ _

rot -y
view elem
view disp
view sh
scal d 10
plot f all
frame


ds 2 e 7

hcpy png Refs/b32-se

frame fix
scal d 10
hcpy png Refs/b32-fix

rot l 30
hcpy png Refs/b32-fix-30

view disp off
ds 1 e 3
asgn graph off
graph b32 length

view disp
scal d 0.1
rot -y
plot fv all

frame
hcpy png Refs/b32-disp
