read Tjoint.frd

ds -0 e 7
view disp
view elem
scal d 20

pnt origin 0 0 0
pnt xaxis 1 0 0
pnt zaxis 0 0 1

seta quarter all
copy all newc mir xaxis origin
copy all newz mir zaxis origin

frame
rot -z
zoom 4
rot r 6
rot u 6
tra u 20

plot f all n
plus fv quarter
hcpy png
sys mv hcpy_1.png SE_expanded.png
